// SBML level 3 version 2

function conc(q, vol)
  piecewise(q/vol, vol > 1e-5, 0);
end

function metab_MM(Vmax, Km, PC, q, vol)
  vol*Vmax*conc(q, vol)/(PC*Km + conc(q, vol));
end

function metab_MA(CLH, PC, q, vol)
  CLH*conc(q, vol)/PC;
end

model euromix()
  // mamo:MAMO_0000203 mamo:MAMO_0000046
  // hasTaxon taxonomy:40674
  // model units - substance: MilliMOL, time: SEC, volume: L

  // Compartments:
  compartment default_compartment = 1 L;  // SBO:0000290
  compartment Fat; Fat has L;  // UBERON:0001013
  compartment Rich; Rich has L;  // UBERON:0000479
  compartment Poor; Poor has L;  // UBERON:0000479
  compartment Liver; Liver has L;  // UBERON:0002107
  compartment Gut = 1 L;  // UBERON:0001555
  compartment Skin_u; Skin_u has L;  // UBERON:0002097
  compartment Skin_e; Skin_e has L;  // UBERON:0002097
  compartment Skin_sc_u; Skin_sc_u has L;  // UBERON:0002097
  compartment Skin_sc_e; Skin_sc_e has L;  // UBERON:0002097
  compartment Art; Art has L;  // UBERON:0013755
  compartment Ven; Ven has L;  // UBERON:0013756

  // Species:
  substanceOnly species QFat in Fat = 0;  // SBO:0000247
  substanceOnly species QRich in Rich = 0;  // SBO:0000247
  substanceOnly species QPoor in Poor = 0;  // SBO:0000247
  substanceOnly species QLiver in Liver = 0;  // SBO:0000247
  substanceOnly species QMetab in Liver = 0;  // CHEBI:25212
  substanceOnly species QGut in Gut = 0;  // SBO:0000247
  substanceOnly species QSkin_u in Skin_u = 0;  // SBO:0000247
  substanceOnly species QSkin_e in Skin_e = 0;  // SBO:0000247
  substanceOnly species QSkin_sc_u in Skin_sc_u = 0;  // SBO:0000247
  substanceOnly species QSkin_sc_e in Skin_sc_e = 0;  // SBO:0000247
  substanceOnly species QArt in Art = 0;  // SBO:0000247
  substanceOnly species QVen in Ven = 0;  // SBO:0000247
  substanceOnly species QExcret in default_compartment = 0;  // SBO:0000247
  species QAir in default_compartment = 0;  // SBO:0000247

  // Parameters:
  BM = 70 KiloGM;
  BSA = 190 DeciM2;
  Height_sc = 0.0001 DeciM;
  Height_vs = 0.0122 DeciM;
  scVFat = 0.209 UNITLESS;  // UO:0000191
  scVRich = 0.105 UNITLESS;  // UO:0000192
  scVLiver = 0.024 UNITLESS;  // UO:0000193
  scVBlood = 0.068 UNITLESS;  // UO:0000194
  scFBlood = 4.8 L_PER_KiloGM_HR;
  scFFat = 0.085 UNITLESS;  // UO:0000194
  scFPoor = 0.12 UNITLESS;  // UO:0000194
  scFLiver = 0.27 UNITLESS;  // UO:0000194
  scFSkin = 0.05 UNITLESS;  // UO:0000194
  Falv = 2220 L_PER_HR;
  rho = 1 KiloGM_PER_L;
  PCFat = 2.53 UNITLESS;
  PCLiver = 0.923 UNITLESS;
  PCRich = 0.875 UNITLESS;
  PCPoor = 0.647 UNITLESS;
  PCSkin_sc = 0.889 UNITLESS;
  PCSkin = 0.889 UNITLESS;
  PCAir = 1e99 UNITLESS;
  Km = 0 MilliMOL;  // SBO:0000027
  Michaelis = 0 UNITLESS;  // STATO:0000034
  Vmax = 0 MilliMOL_PER_L_HR;  // SBO:0000186
  fub = 0.51 UNITLESS;
  fSA_exposed = 0.1 UNITLESS;  // UO:0000194
  Kp_sc_vs = 0.01 DeciM_PER_HR;  // SBO:0000491
  kGut = 1 PER_H;
  CLH = 132 L_PER_HR;
  Ke = 7.5 L_PER_HR;
  VFat has L;  // PATO:0000918
  VRich has L;  // PATO:0000918
  VLiver has L;  // PATO:0000918
  VBlood has L;  // PATO:0000918
  VArt has L;  // PATO:0000918
  VVen has L;  // PATO:0000918
  VSkin_e has L;  // PATO:0000918
  VSkin_u has L;  // PATO:0000918
  VSkin_sc_e has L;  // PATO:0000918
  VSkin_sc_u has L;  // PATO:0000918
  VPoor has L;  // PATO:0000918
  f_su has L_PER_HR;
  f_se has L_PER_HR;
  FBlood has L_PER_HR;
  FFat has L_PER_HR;
  FPoor has L_PER_HR;
  FLiver has L_PER_HR;
  FSkin has L_PER_HR;
  FRich has L_PER_HR;
  FSkin_e has L_PER_HR;
  FSkin_u has L_PER_HR;

  // Assignment rules:
  Fat := VFat;
  Rich := VRich;
  Poor := VPoor;
  Liver := VLiver;
  Skin_u := VSkin_u;
  Skin_e := VSkin_e;
  Skin_sc_u := VSkin_sc_u;
  Skin_sc_e := VSkin_sc_e;
  Art := VArt;
  Ven := VVen;
  VFat := BM*scVFat/rho;
  VRich := BM*scVRich/rho;
  VLiver := BM*scVLiver/rho;
  VBlood := BM*scVBlood/rho;
  VArt := VBlood/3;
  VVen := VBlood - VArt;
  VSkin_e := BSA*Height_vs*fSA_exposed;
  VSkin_u := BSA*Height_vs*(1 - fSA_exposed);
  VSkin_sc_e := BSA*Height_sc*fSA_exposed;
  VSkin_sc_u := BSA*Height_sc*(1 - fSA_exposed);
  VPoor := BM/rho - VFat - VRich - VLiver - VSkin_e - VSkin_u - VSkin_sc_e - VSkin_sc_u - VBlood - 0.1*(BM/rho);
  f_su := Kp_sc_vs*BSA*(1 - fSA_exposed);
  f_se := Kp_sc_vs*BSA*fSA_exposed;
  FBlood := scFBlood*BM;
  FFat := FBlood*scFFat;
  FPoor := FBlood*scFPoor;
  FLiver := FBlood*scFLiver;
  FSkin := FBlood*scFSkin;
  FRich := FBlood - FFat - FPoor - FLiver - FSkin;
  FSkin_e := FSkin*fSA_exposed;
  FSkin_u := FSkin - FSkin_e;

  // Reactions:
  _J0: QArt -> QFat; FFat*conc(QArt, Art);
  _J1: QFat -> QVen; FFat*conc(QFat, Fat)/PCFat;
  _J2: QArt -> QRich; FRich*conc(QArt, Art);
  _J3: QRich -> QVen; FRich*conc(QRich, Rich)/PCRich;
  _J4: QArt -> QPoor; FPoor*conc(QArt, Art);
  _J5: QPoor -> QVen; FPoor*conc(QPoor, Poor)/PCPoor;
  _J6: QArt -> QLiver; FLiver*conc(QArt, Art);
  _J7: QLiver -> QVen; FLiver*conc(QLiver, Liver)/PCLiver;
  _J8: QGut -> QLiver; kGut*QGut;
  _J9: QArt -> QSkin_u; FSkin_u*conc(QArt, Art);
  _J10: QSkin_u -> QVen; FSkin_u*conc(QSkin_u, Skin_u)/PCSkin;
  _J11: QSkin_u -> QSkin_sc_u; f_su*conc(QSkin_u, Skin_u)/PCSkin_sc;
  _J12: QSkin_sc_u -> QSkin_u; f_su*conc(QSkin_sc_u, Skin_sc_u);
  _J13: QArt -> QSkin_e; FSkin_e*conc(QArt, Art);
  _J14: QSkin_e -> QVen; FSkin_e*conc(QSkin_e, Skin_e)/PCSkin;
  _J15: QSkin_e -> QSkin_sc_e; f_se*conc(QSkin_e, Skin_e)/PCSkin_sc;
  _J16: QSkin_sc_e -> QSkin_e; f_se*conc(QSkin_sc_e, Skin_sc_e);
  _J17: QVen -> QArt; FBlood*conc(QVen, Ven);
  _J18: QLiver -> QMetab; fub*piecewise(metab_MM(Vmax, Km, PCLiver, QLiver, Liver), Michaelis > 0.5, metab_MA(CLH, PCLiver, QLiver, Liver));
  _J19: QArt -> QAir; Falv*conc(QArt, Art)/PCAir;
  _J20: QArt -> QExcret; Ke*fub*conc(QArt, Art);

  // Unit definitions:
  unit SEC = second;
  unit MilliMOL = 1e-3 mole;
  unit L = litre;
  unit KiloGM = 1000 gram;
  unit DeciM2 = (0.1 metre)^2;
  unit DeciM = 0.1 metre;
  unit UNITLESS = dimensionless;
  unit KiloGM_PER_L = 1000 gram / litre;
  unit L_PER_KiloGM_HR = litre / (36000 second * 1000 gram);
  unit L_PER_HR = litre / (36000 second);
  unit MilliMOL_PER_L_HR = 1e-3 mole / (36000 second * 1000 litre);
  unit DeciM_PER_HR = 0.1 metre / (36000 second);
  unit PER_H = 1 / (36000 second);
end
